07-07-25
15:37
$PROBLEM    2cpt_zo_foce_full
$INPUT      ID ARM TIME EVID MDV AMT CMT RATE DOSENO DV WT METAB TDOS
            TSLD
$DATA      dataset_definf1_defobs1.csv IGNORE=@
$SUBROUTINE ADVAN3 TRANS4
$PK
TVMETAB_CL=THETA(1)
IF (METAB==0) TVMETAB_CL=0
TVCL=(THETA(2) * (1 + TVMETAB_CL))
TVVC=THETA(3)
TVVP=THETA(4)
TVQ=THETA(5)
TVDUR=THETA(6)
TVPROP_RUV=THETA(7)

METAB_CL=TVMETAB_CL
CL=TVCL * EXP(ETA(1))*(WT/70)**(0.75)
VC=TVVC * EXP(ETA(2))*(WT/70)**(1)
VP=TVVP*(WT/70)**(1)
Q=TVQ*(WT/70)**(0.75)
DUR=TVDUR * EXP(ETA(3))
PROP_RUV=TVPROP_RUV
D1=DUR
V1=VC
V2=VP
S1=V1

$ERROR
CONC=A(1)/VC
IF (CONC <= 0.001) CONC=0.001
IPRED=LOG(CONC)
W=PROP_RUV
Y=IPRED + W*EPS(1)

$THETA  (0,0.3) ; THETA_METAB_CL
$THETA  (0,5) ; THETA_CL
$THETA  (0,80) ; THETA_VC
$THETA  (0,200) ; THETA_VP
$THETA  (0,4) ; THETA_Q
$THETA  (0,1.5) ; THETA_DUR
$THETA  (0,0.15) ; THETA_PROP_RUV
$OMEGA  BLOCK(3)
 0.0606246  ;   OMEGA_CL
 0.00303123 0.0606246  ;   OMEGA_VC
 0.00122804 0.00122804 0.00995033  ;  OMEGA_DUR
$SIGMA  1  FIX  ; SIGMA_RUV_FIX
$ESTIMATION METHOD=COND INTERACTION NSIG=2 SIGL=6 MAXEVAL=9999
$COVARIANCE PRINT=E
$TABLE      ID TIME AMT RATE DV CMT MDV EVID ETAS(1:LAST) IPRED
            NOAPPEND ONEHEADER NOPRINT FILE=model.tab

NM-TRAN MESSAGES
 WARNINGS AND ERRORS (IF ANY) FOR PROBLEM    1
 (WARNING  2) NM-TRAN INFERS THAT THE DATA ARE POPULATION.

1NONLINEAR MIXED EFFECTS MODEL PROGRAM (NONMEM) VERSION 7.5.0
 ORIGINALLY DEVELOPED BY STUART BEAL, LEWIS SHEINER, AND ALISON BOECKMANN
 CURRENT DEVELOPERS ARE ROBERT BAUER, ICON DEVELOPMENT SOLUTIONS,
 AND ALISON BOECKMANN. IMPLEMENTATION, EFFICIENCY, AND STANDARDIZATION
 PERFORMED BY NOUS INFOSYSTEMS.
 PROBLEM NO.:         1
 2cpt_zo_foce_full
 TOT. NO. OF OBS RECS:     1740
 TOT. NO. OF INDIVIDUALS:       60
 TWO COMPARTMENT MODEL (ADVAN3)
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 #TBLN:      1
 #METH: First Order Conditional Estimation with Interaction
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
 #TERM:
0MINIMIZATION SUCCESSFUL
 NO. OF FUNCTION EVALUATIONS USED:      259
 NO. OF SIG. DIGITS IN FINAL EST.:  2.1

 ETABAR IS THE ARITHMETIC MEAN OF THE ETA-ESTIMATES,
 AND THE P-VALUE IS GIVEN FOR THE NULL HYPOTHESIS THAT THE TRUE MEAN IS 0.

 ETABAR:         1.0196E-03 -8.3571E-04  3.2698E-04
 SE:             2.5837E-02  2.6262E-02  6.8448E-03
 N:                      60          60          60

 P VAL.:         9.6852E-01  9.7461E-01  9.6190E-01

 ETASHRINKSD(%)  2.6477E-01  3.9997E+00  3.1345E+01
 ETASHRINKVR(%)  5.2884E-01  7.8395E+00  5.2865E+01
 EBVSHRINKSD(%)  1.0687E+00  4.6840E+00  3.1919E+01
 EBVSHRINKVR(%)  2.1259E+00  9.1486E+00  5.3650E+01
 RELATIVEINF(%)  9.1655E+01  7.9534E+01  2.5556E+01
 EPSSHRINKSD(%)  3.7567E+00
 EPSSHRINKVR(%)  7.3723E+00


 TOTAL DATA POINTS NORMALLY DISTRIBUTED (N):         1740
 N*LOG(2PI) CONSTANT TO OBJECTIVE FUNCTION:    3197.9060955522609
 OBJECTIVE FUNCTION VALUE WITHOUT CONSTANT:   -4395.1692135966787
 OBJECTIVE FUNCTION VALUE WITH CONSTANT:      -1197.2631180444178
 REPORTED OBJECTIVE FUNCTION DOES NOT CONTAIN CONSTANT

 TOTAL EFFECTIVE ETAS (NIND*NETA):                           180


 #TERE:
 Elapsed estimation  time in seconds:     4.88
 Elapsed covariance  time in seconds:     5.33
 Elapsed postprocess time in seconds:     0.03

 ********************               FIRST ORDER CONDITIONAL ESTIMATION WITH INTERACTION              ********************
 #OBJT:**************                       MINIMUM VALUE OF OBJECTIVE FUNCTION                      ********************
 #OBJV:********************************************    -4395.169       **************************************************

 ********************               FIRST ORDER CONDITIONAL ESTIMATION WITH INTERACTION              ********************
 ********************                             FINAL PARAMETER ESTIMATE                           ********************

 THETA - VECTOR OF FIXED EFFECTS PARAMETERS   *********
         TH 1      TH 2      TH 3      TH 4      TH 5      TH 6      TH 7
         3.77E-01  4.99E+00  8.29E+01  2.04E+02  4.11E+00  1.47E+00  1.52E-01

 OMEGA - COV MATRIX FOR RANDOM EFFECTS - ETAS  ********
         ETA1      ETA2      ETA3
 ETA1
+        4.09E-02
 ETA2
+       -5.17E-03  4.57E-02
 ETA3
+        6.75E-03  2.26E-03  6.06E-03

 SIGMA - COV MATRIX FOR RANDOM EFFECTS - EPSILONS  ****
         EPS1
 EPS1
+        1.00E+00

 OMEGA - CORR MATRIX FOR RANDOM EFFECTS - ETAS  *******
         ETA1      ETA2      ETA3
 ETA1
+        2.02E-01
 ETA2
+       -1.20E-01  2.14E-01
 ETA3
+        4.29E-01  1.36E-01  7.79E-02

 SIGMA - CORR MATRIX FOR RANDOM EFFECTS - EPSILONS  ***
         EPS1
 EPS1
+        1.00E+00

 ********************               FIRST ORDER CONDITIONAL ESTIMATION WITH INTERACTION              ********************
 ********************                            STANDARD ERROR OF ESTIMATE                          ********************

 THETA - VECTOR OF FIXED EFFECTS PARAMETERS   *********
         TH 1      TH 2      TH 3      TH 4      TH 5      TH 6      TH 7
         7.16E-02  1.69E-01  2.49E+00  6.99E+00  7.27E-02  2.65E-02  2.55E-03

 OMEGA - COV MATRIX FOR RANDOM EFFECTS - ETAS  ********
         ETA1      ETA2      ETA3
 ETA1
+        8.43E-03
 ETA2
+        6.25E-03  9.00E-03
 ETA3
+        4.83E-03  4.01E-03  3.73E-03

 SIGMA - COV MATRIX FOR RANDOM EFFECTS - EPSILONS  ****
         EPS1
 EPS1
+       .........

 OMEGA - CORR MATRIX FOR RANDOM EFFECTS - ETAS  *******
         ETA1      ETA2      ETA3
 ETA1
+        2.08E-02
 ETA2
+        1.47E-01  2.11E-02
 ETA3
+        2.24E-01  2.53E-01  2.40E-02

 SIGMA - CORR MATRIX FOR RANDOM EFFECTS - EPSILONS  ***
         EPS1
 EPS1
+       .........

 ********************               FIRST ORDER CONDITIONAL ESTIMATION WITH INTERACTION              ********************
 ********************                          COVARIANCE MATRIX OF ESTIMATE                         ********************

            TH 1      TH 2      TH 3      TH 4      TH 5      TH 6      TH 7      OM11      OM12      OM13      OM22      OM23
             OM33      SG11
 TH 1
+        5.13E-03
 TH 2
+       -7.91E-03  2.85E-02
 TH 3
+       -3.90E-02  4.58E-02  6.21E+00
 TH 4
+       -3.71E-02  1.34E-01  2.55E+00  4.89E+01
 TH 5
+        8.11E-04 -1.20E-03 -2.48E-02 -1.68E-02  5.29E-03
 TH 6
+        2.30E-05  6.54E-04 -9.52E-03 -3.19E-02  2.49E-05  7.00E-04
 TH 7
+        2.26E-05 -4.00E-05  7.43E-04 -4.70E-04  1.49E-05 -1.90E-05  6.52E-06
 OM11
+        1.33E-04 -5.20E-04 -2.92E-03  1.20E-02  1.46E-04 -8.83E-05  3.61E-06  7.10E-05
 OM12
+        5.93E-05 -3.05E-04 -2.22E-03  1.20E-02  1.02E-04 -1.54E-05 -1.47E-06  1.83E-05  3.91E-05
 OM13
+        3.38E-05 -3.26E-04 -1.43E-03 -3.84E-03  4.23E-05 -2.22E-05  5.67E-07  2.21E-05  5.51E-06  2.33E-05
 OM22
+       -4.53E-05 -3.09E-05  8.70E-03 -1.41E-02 -5.89E-05 -1.26E-05 -5.08E-06 -3.94E-07 -1.30E-05  5.51E-06  8.10E-05
 OM23
+        2.48E-05 -8.64E-05 -1.27E-03 -1.23E-03  6.55E-05 -1.19E-05 -9.37E-07  8.19E-06  1.12E-05  1.20E-06 -3.91E-06  1.61E-05
 OM33
+       -3.81E-06 -7.98E-05 -8.99E-04  1.85E-03 -3.71E-05  4.02E-06 -1.38E-06  9.70E-06  1.92E-06  1.15E-05  6.10E-07 -2.44E-06
          1.39E-05
 SG11
+       ......... ......... ......... ......... ......... ......... ......... ......... ......... ......... ......... .........
         ......... .........

 ********************               FIRST ORDER CONDITIONAL ESTIMATION WITH INTERACTION              ********************
 ********************                          CORRELATION MATRIX OF ESTIMATE                        ********************

            TH 1      TH 2      TH 3      TH 4      TH 5      TH 6      TH 7      OM11      OM12      OM13      OM22      OM23
             OM33      SG11
 TH 1
+        7.16E-02
 TH 2
+       -6.54E-01  1.69E-01
 TH 3
+       -2.18E-01  1.09E-01  2.49E+00
 TH 4
+       -7.41E-02  1.13E-01  1.46E-01  6.99E+00
 TH 5
+        1.56E-01 -9.73E-02 -1.37E-01 -3.30E-02  7.27E-02
 TH 6
+        1.21E-02  1.46E-01 -1.44E-01 -1.73E-01  1.29E-02  2.65E-02
 TH 7
+        1.24E-01 -9.27E-02  1.17E-01 -2.63E-02  8.01E-02 -2.81E-01  2.55E-03
 OM11
+        2.21E-01 -3.65E-01 -1.39E-01  2.03E-01  2.38E-01 -3.96E-01  1.68E-01  8.43E-03
 OM12
+        1.32E-01 -2.89E-01 -1.42E-01  2.74E-01  2.25E-01 -9.31E-02 -9.23E-02  3.47E-01  6.25E-03
 OM13
+        9.77E-02 -4.00E-01 -1.18E-01 -1.14E-01  1.20E-01 -1.74E-01  4.60E-02  5.44E-01  1.83E-01  4.83E-03
 OM22
+       -7.03E-02 -2.03E-02  3.88E-01 -2.25E-01 -8.99E-02 -5.30E-02 -2.21E-01 -5.20E-03 -2.30E-01  1.27E-01  9.00E-03
 OM23
+        8.66E-02 -1.28E-01 -1.27E-01 -4.38E-02  2.25E-01 -1.12E-01 -9.16E-02  2.43E-01  4.48E-01  6.21E-02 -1.08E-01  4.01E-03
 OM33
+       -1.42E-02 -1.26E-01 -9.65E-02  7.08E-02 -1.36E-01  4.07E-02 -1.45E-01  3.08E-01  8.22E-02  6.41E-01  1.81E-02 -1.63E-01
          3.73E-03
 SG11
+       ......... ......... ......... ......... ......... ......... ......... ......... ......... ......... ......... .........
         ......... .........
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
 ********************               FIRST ORDER CONDITIONAL ESTIMATION WITH INTERACTION              ********************
 ********************                      EIGENVALUES OF COR MATRIX OF ESTIMATE                     ********************

             1         2         3         4         5         6         7         8         9        10        11        12
             13
         1.74E-01  2.59E-01  2.93E-01  3.96E-01  4.55E-01  6.67E-01  8.34E-01  1.04E+00  1.25E+00  1.47E+00  1.56E+00  1.77E+00
          2.84E+00
 Elapsed finaloutput time in seconds:     0.50
 #CPUT: Total CPU Time in Seconds,       11.625
