01-04-21
16:19
$PROBLEM    2-compartment model
$INPUT      ID ARM TIME EVID MDV AMT CMT DOSENO RATE DV
$DATA      dataset.csv IGNORE=I
$SUBROUTINE ADVAN3 TRANS4
$PK
 CL = THETA(1) * EXP(ETA(1))
 V1 = THETA(2) * EXP(ETA(2))
 V2 = THETA(3) ;* EXP(ETA(3))
 Q = THETA(4) ;* EXP(ETA(4))
 S1 = V1
 D1 = 5
$ERROR
 CP = F
 OBS_CP = CP *(1+EPS(1))
 Y = OBS_CP
$THETA  (0,5) ; CL
$THETA  (0,80) ; V1
$THETA  (0,20) ; V2
$THETA  (0,4) ; Q
$OMEGA  0.025  ;        CL_
$OMEGA  0.025  ;        V1_
;$OMEGA 0.025 ; V2
;$OMEGA 0.025 ; Q
$SIGMA  0.025  ;       PROP
$ESTIMATION METHOD=1
$COVARIANCE PRINT=E

NM-TRAN MESSAGES
 WARNINGS AND ERRORS (IF ANY) FOR PROBLEM    1
 (WARNING  2) NM-TRAN INFERS THAT THE DATA ARE POPULATION.

1NONLINEAR MIXED EFFECTS MODEL PROGRAM (NONMEM) VERSION 7.5.0
 ORIGINALLY DEVELOPED BY STUART BEAL, LEWIS SHEINER, AND ALISON BOECKMANN
 CURRENT DEVELOPERS ARE ROBERT BAUER, ICON DEVELOPMENT SOLUTIONS,
 AND ALISON BOECKMANN. IMPLEMENTATION, EFFICIENCY, AND STANDARDIZATION
 PERFORMED BY NOUS INFOSYSTEMS.
 PROBLEM NO.:         1
 2-compartment model
 TOT. NO. OF OBS RECS:     1800
 TOT. NO. OF INDIVIDUALS:       40
 TWO COMPARTMENT MODEL (ADVAN3)
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 #TBLN:      1
 #METH: First Order Conditional Estimation
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
 #TERM:
0MINIMIZATION SUCCESSFUL
 NO. OF FUNCTION EVALUATIONS USED:      163
 NO. OF SIG. DIGITS IN FINAL EST.:  3.7

 ETABAR IS THE ARITHMETIC MEAN OF THE ETA-ESTIMATES,
 AND THE P-VALUE IS GIVEN FOR THE NULL HYPOTHESIS THAT THE TRUE MEAN IS 0.

 ETABAR:         5.3933E-03 -7.2328E-03
 SE:             2.3198E-02  1.9188E-02
 N:                      40          40

 P VAL.:         8.1616E-01  7.0622E-01

 ETASHRINKSD(%)  4.9096E-01  8.9553E+00
 ETASHRINKVR(%)  9.7952E-01  1.7109E+01
 EBVSHRINKSD(%)  1.5225E+00  9.9027E+00
 EBVSHRINKVR(%)  3.0218E+00  1.8825E+01
 RELATIVEINF(%)  9.6978E+01  8.1175E+01
 EPSSHRINKSD(%)  1.9952E+00
 EPSSHRINKVR(%)  3.9506E+00


 TOTAL DATA POINTS NORMALLY DISTRIBUTED (N):         1800
 N*LOG(2PI) CONSTANT TO OBJECTIVE FUNCTION:    3308.1787195368215
 OBJECTIVE FUNCTION VALUE WITHOUT CONSTANT:   -5851.5269106566166
 OBJECTIVE FUNCTION VALUE WITH CONSTANT:      -2543.3481911197950
 REPORTED OBJECTIVE FUNCTION DOES NOT CONTAIN CONSTANT

 TOTAL EFFECTIVE ETAS (NIND*NETA):                            80


 #TERE:
 Elapsed estimation  time in seconds:     2.17
 Elapsed covariance  time in seconds:     1.75
 Elapsed postprocess time in seconds:     0.00

 ********************                        FIRST ORDER CONDITIONAL ESTIMATION                      ********************
 #OBJT:**************                       MINIMUM VALUE OF OBJECTIVE FUNCTION                      ********************
 #OBJV:********************************************    -5851.527       **************************************************

 ********************                        FIRST ORDER CONDITIONAL ESTIMATION                      ********************
 ********************                             FINAL PARAMETER ESTIMATE                           ********************

 THETA - VECTOR OF FIXED EFFECTS PARAMETERS   *********
         TH 1      TH 2      TH 3      TH 4
         4.77E+00  8.26E+01  1.95E+01  3.81E+00

 OMEGA - COV MATRIX FOR RANDOM EFFECTS - ETAS  ********
         ETA1      ETA2
 ETA1
+        2.23E-02
 ETA2
+        0.00E+00  1.82E-02

 SIGMA - COV MATRIX FOR RANDOM EFFECTS - EPSILONS  ****
         EPS1
 EPS1
+        2.45E-02

 OMEGA - CORR MATRIX FOR RANDOM EFFECTS - ETAS  *******
         ETA1      ETA2
 ETA1
+        1.49E-01
 ETA2
+        0.00E+00  1.35E-01

 SIGMA - CORR MATRIX FOR RANDOM EFFECTS - EPSILONS  ***
         EPS1
 EPS1
+        1.56E-01

 ********************                        FIRST ORDER CONDITIONAL ESTIMATION                      ********************
 ********************                            STANDARD ERROR OF ESTIMATE                          ********************

 THETA - VECTOR OF FIXED EFFECTS PARAMETERS   *********
         TH 1      TH 2      TH 3      TH 4
         1.16E-01  1.93E+00  1.54E+00  4.73E-01

 OMEGA - COV MATRIX FOR RANDOM EFFECTS - ETAS  ********
         ETA1      ETA2
 ETA1
+        4.87E-03
 ETA2
+       .........  5.17E-03

 SIGMA - COV MATRIX FOR RANDOM EFFECTS - EPSILONS  ****
         EPS1
 EPS1
+        8.13E-04

 OMEGA - CORR MATRIX FOR RANDOM EFFECTS - ETAS  *******
         ETA1      ETA2
 ETA1
+        1.63E-02
 ETA2
+       .........  1.92E-02

 SIGMA - CORR MATRIX FOR RANDOM EFFECTS - EPSILONS  ***
         EPS1
 EPS1
+        2.60E-03

 ********************                        FIRST ORDER CONDITIONAL ESTIMATION                      ********************
 ********************                          COVARIANCE MATRIX OF ESTIMATE                         ********************

            TH 1      TH 2      TH 3      TH 4      OM11      OM12      OM22      SG11
 TH 1
+        1.35E-02
 TH 2
+       -1.10E-03  3.71E+00
 TH 3
+       -3.45E-02  3.39E-01  2.37E+00
 TH 4
+       -5.62E-04 -2.45E-01 -1.08E-01  2.23E-01
 OM11
+        1.76E-04  1.11E-04 -6.13E-04 -6.66E-07  2.37E-05
 OM12
+       ......... ......... ......... ......... ......... .........
 OM22
+        2.61E-05  1.03E-03 -9.65E-04  1.58E-04 -5.10E-06 .........  2.68E-05
 SG11
+        1.49E-05 -3.92E-05  1.92E-04  4.08E-05  1.43E-07 ......... -7.97E-07  6.60E-07

 ********************                        FIRST ORDER CONDITIONAL ESTIMATION                      ********************
 ********************                          CORRELATION MATRIX OF ESTIMATE                        ********************

            TH 1      TH 2      TH 3      TH 4      OM11      OM12      OM22      SG11
 TH 1
+        1.16E-01
 TH 2
+       -4.89E-03  1.93E+00
 TH 3
+       -1.93E-01  1.15E-01  1.54E+00
 TH 4
+       -1.02E-02 -2.69E-01 -1.49E-01  4.73E-01
 OM11
+        3.11E-01  1.18E-02 -8.18E-02 -2.90E-04  4.87E-03
 OM12
+       ......... ......... ......... ......... ......... .........
 OM22
+        4.33E-02  1.03E-01 -1.21E-01  6.48E-02 -2.03E-01 .........  5.17E-03
 SG11
+        1.58E-01 -2.50E-02  1.54E-01  1.06E-01  3.62E-02 ......... -1.90E-01  8.13E-04
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
 ********************                        FIRST ORDER CONDITIONAL ESTIMATION                      ********************
 ********************                      EIGENVALUES OF COR MATRIX OF ESTIMATE                     ********************

             1         2         3         4         5         6         7
         5.00E-01  6.97E-01  7.36E-01  9.71E-01  1.26E+00  1.36E+00  1.48E+00
 Elapsed finaloutput time in seconds:     0.02
 #CPUT: Total CPU Time in Seconds,        4.359
